OpenVSP model (file version 5), 8 components.
Geometry view with OpenVSP parameter names; values to 6 digits, angles in degrees, lengths in the model's unit.
Overall bounding box: X_Min=0 X_Len=53.8674 Y_Min=-13.3965 Y_Len=26.793 Z_Min=-5 Z_Len=19

Fuselage "Fuselage"
  location (X Y Z) 0 0 0, rotation 0 0 0
  bounding box size 50.8182 9 9
  mass: Density=1 Shell_Flag=1 Mass_Area=1 Mass_Prior=0
  Design: Length=50
  cross sections:
    n  XLocPercent  YLocPercent  ZLocPercent  shape
    0  0            0            0            point
    1  0.25         0            0            circle Circle_Diameter=9
    2  0.35         0            0            as above
    3  0.6          0            0            as above
    4  0.787301     0            0            as above
    5  0.9          0            0            as above
    6  1            0            0            as above
  structure "Fuselage_Struct0": Skin, ThrustPlate, LowerCH4, CommonBulkhead, UpperLox, CargoBulkhead, CraneBulkhead, SpinePlane

Box "Box", child of "Fuselage"
  location (X Y Z) 45 0 4.5, rotation 0 0 0
  bounding box size 5 2 1
  Design: Height=1 Length=5 SquareFlag=0 Width=2
  custom script Box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

Custom "Box", child of "Fuselage"
  location (X Y Z) 45 0 -4.5, rotation 0 0 0
  bounding box size 5 2 1
  Design: Height=1 Length=5 SquareFlag=0 Width=2
  custom script Box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

Custom "Box", child of "Fuselage"
  location (X Y Z) 45 4.5 0, rotation 90 0 0
  bounding box size 5 1 2
  Design: Height=1 Length=5 SquareFlag=0 Width=2
  custom script Box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

Custom "Box", child of "Fuselage"
  location (X Y Z) 45 -4.5 0, rotation 90 0 0
  bounding box size 5 1 2
  Design: Height=1 Length=5 SquareFlag=0 Width=2
  custom script Box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

Wing "WingLegs"
  location (X Y Z) 39.25 3.68 -2.115, rotation -30 0 0
  symmetric about XZ
  bounding box size 14.6174 26.793 1.08733
  totals: TotalSpan=19.5 TotalProjectedSpan=16.9545 TotalChord=8.9375 TotalArea=145.375 TotalAR=1.97733
  root: chord 10.5, twist 0, NACA 4-series Camber=0 CamberLoc=0.2 ThickChord=0.1
  sections:
    n  Span  Root_Chord  Tip_Chord  Area     Sweep  Sweep_Location  Dihedral  Twist  Twist_Location  tip airfoil
    1  0.25  10.5        10.5       2.625    0      0               0         0      0.25            NACA 4-series Camber=0 CamberLoc=0.1 ThickChord=0.1
    2  9.5   10.5        4.25       70.0625  47.5   0               30        0      0.25            NACA 4-series Camber=0 CamberLoc=0.2 ThickChord=0.1
  structure "WingLegs_Struct0": Skin, WingLegSpar, Rib1, Rib2, Rib3, Rib4, Rib5, FixPoint6

Wing "Canards"
  location (X Y Z) 5.5 0 0, rotation 0 0 0
  symmetric about XZ
  bounding box size 3.75138 12.5 0.350203
  totals: TotalSpan=12.5 TotalProjectedSpan=12.5 TotalChord=3.1875 TotalArea=38.5938 TotalAR=4.04858
  root: chord 3.5, twist 0, NACA 4-series Camber=0 CamberLoc=0.2 ThickChord=0.1
  sections:
    n  Span   Root_Chord  Tip_Chord  Area     Sweep  Sweep_Location  Dihedral  Twist  Twist_Location  tip airfoil
    1  2.125  3.5         3.5        7.4375   0      0               0         0      0.25            as above
    2  4.125  3.5         2.25       11.8594  20     0               0         0      0.25            as above
  structure "Canards_Struct0": Skin, Spar0, Spar1, Rib2, Rib3

Wing "TailLeg"
  location (X Y Z) 39.25 0 4.25, rotation 90 0 0
  bounding box size 14.6174 1.05061 9.75
  totals: TotalSpan=9.75 TotalProjectedSpan=9.75 TotalChord=8.9375 TotalArea=72.6875 TotalAR=1.30782
  root: chord 10.5, twist 0, NACA 4-series Camber=0 CamberLoc=0.2 ThickChord=0.1
  sections:
    n  Span  Root_Chord  Tip_Chord  Area     Sweep  Sweep_Location  Dihedral  Twist  Twist_Location  tip airfoil
    1  0.25  10.5        10.5       2.625    0      0               0         0      0.25            NACA 4-series Camber=0 CamberLoc=0.1 ThickChord=0.1
    2  9.5   10.5        4.25       70.0625  47.5   0               0         0      0.25            NACA 4-series Camber=0 CamberLoc=0.2 ThickChord=0.1
  structure "TailLeg_Struct0": Skin, TailLegSpar, Rib1, Rib2, Rib3, Rib4, Rib5
