OpenVSP model (file version 5), 108 components.
Geometry view with OpenVSP parameter names; values to 6 digits, angles in degrees, lengths in the model's unit.
Overall bounding box: X_Min=0 X_Len=120 Y_Min=-8.37838 Y_Len=16.7568 Z_Min=-5.49593 Z_Len=10.9919

Fuselage "SuperHeavy Fuse"
  location (X Y Z) 49.9876 0 0, rotation 0 0 0
  bounding box size 70 10 10
  mass: Density=0 Shell_Flag=1 Mass_Area=40 Mass_Prior=0
  Design: Length=70
  cross sections:
    n  XLocPercent  YLocPercent  ZLocPercent  shape
    0  0            0            0            circle Circle_Diameter=9
    1  0.938339     0            0            as above
    2  0.971429     0            0            circle Circle_Diameter=10
    3  1            0            0            as above

Blank "GridFins_Assy", child of "SuperHeavy Fuse"
  location (X Y Z) 49.9876 0 0, rotation 30 0 0; relative location 0 0 0, rotation 30 0 0

Blank "Grid Fin", child of "GridFins_Assy"
  location (X Y Z) 51.9876 3.89711 2.25, rotation 30 0 0; relative location 2 4.5 0, rotation 0 0 0

Wing "Long Walls", child of "Grid Fin"
  location (X Y Z) 51.9876 3.33461 3.22428, rotation 30 0 0; relative location 0 0 1.125, rotation 0 0 0
  symmetric about XY
  bounding box size 0.25 5.04711 4.24186
  mass: Density=8000 Shell_Flag=0 Mass_Area=1 Mass_Prior=0
  totals: TotalSpan=9 TotalProjectedSpan=9 TotalChord=0.25 TotalArea=2.25 TotalAR=36
  root: chord 0.25, twist 0, rounded rectangle RoundRectXSec_Radius=0.025 RoundedRect_Height=0.05 RoundedRect_Width=0.25
  sections:
    n  Span  Root_Chord  Tip_Chord  Area   Sweep  Sweep_Location  Dihedral  Twist  Twist_Location  tip airfoil
    1  4.5   0.25        0.25       1.125  0      0               0         0      0.25            rounded rectangle RoundRectXSec_Radius=0.0133949 RoundedRect_Height=0.05 RoundedRect_Width=0.25

Wing "Short Walls", child of "Grid Fin"
  location (X Y Z) 51.9876 4.45961 1.27572, rotation 120 0 0; relative location 0 0 -1.125, rotation 90 0 0
  bounding box size 0.25 1.1683 1.97356
  mass: Density=8000 Shell_Flag=0 Mass_Area=1 Mass_Prior=0
  totals: TotalSpan=2.25 TotalProjectedSpan=2.25 TotalChord=0.25 TotalArea=0.5625 TotalAR=9
  root: chord 0.25, twist 0, rounded rectangle RoundRectXSec_Radius=0.025 RoundedRect_Height=0.05 RoundedRect_Width=0.25
  sections:
    n  Span  Root_Chord  Tip_Chord  Area    Sweep  Sweep_Location  Dihedral  Twist  Twist_Location  tip airfoil
    1  2.25  0.25        0.25       0.5625  0      0               0         0      0.25            rounded rectangle RoundRectXSec_Radius=0.0133949 RoundedRect_Height=0.05 RoundedRect_Width=0.25

Wing "Short Walls", child of "Grid Fin"
  location (X Y Z) 51.9876 8.35673 3.52572, rotation 120 0 0; relative location 0 4.5 -1.125, rotation 90 0 0
  bounding box size 0.25 1.1683 1.97356
  mass: Density=8000 Shell_Flag=0 Mass_Area=1 Mass_Prior=0
  totals: TotalSpan=2.25 TotalProjectedSpan=2.25 TotalChord=0.25 TotalArea=0.5625 TotalAR=9
  root: chord 0.25, twist 0, rounded rectangle RoundRectXSec_Radius=0.025 RoundedRect_Height=0.05 RoundedRect_Width=0.25
  sections:
    n  Span  Root_Chord  Tip_Chord  Area    Sweep  Sweep_Location  Dihedral  Twist  Twist_Location  tip airfoil
    1  2.25  0.25        0.25       0.5625  0      0               0         0      0.25            rounded rectangle RoundRectXSec_Radius=0.0133949 RoundedRect_Height=0.05 RoundedRect_Width=0.25

Wing "Angle0", child of "Grid Fin"
  location (X Y Z) 51.9876 3.89711 2.25, rotation 75 0 0; relative location 0 0 0, rotation 45 0 0
  bounding box size 0.25 0.460075 1.54972
  mass: Density=8000 Shell_Flag=0 Mass_Area=1 Mass_Prior=0
  totals: TotalSpan=1.59099 TotalProjectedSpan=1.59099 TotalChord=0.25 TotalArea=0.397748 TotalAR=6.36396
  root: chord 0.25, twist 0, rounded rectangle RoundRectXSec_Radius=0.025 RoundedRect_Height=0.05 RoundedRect_Width=0.25
  sections:
    n  Span     Root_Chord  Tip_Chord  Area      Sweep  Sweep_Location  Dihedral  Twist  Twist_Location  tip airfoil
    1  1.59099  0.25        0.25       0.397748  0      0               0         0      0.25            rounded rectangle RoundRectXSec_Radius=0.0133949 RoundedRect_Height=0.05 RoundedRect_Width=0.25

Wing "Angle1", child of "Grid Fin"
  location (X Y Z) 51.9876 4.45961 1.27572, rotation 75 0 0; relative location 0 0 -1.125, rotation 45 0 0
  bounding box size 0.25 0.871854 3.0865
  mass: Density=8000 Shell_Flag=0 Mass_Area=1 Mass_Prior=0
  totals: TotalSpan=3.18198 TotalProjectedSpan=3.18198 TotalChord=0.25 TotalArea=0.795496 TotalAR=12.7279
  root: chord 0.25, twist 0, rounded rectangle RoundRectXSec_Radius=0.025 RoundedRect_Height=0.05 RoundedRect_Width=0.25
  sections:
    n  Span     Root_Chord  Tip_Chord  Area      Sweep  Sweep_Location  Dihedral  Twist  Twist_Location  tip airfoil
    1  3.18198  0.25        0.25       0.795496  0      0               0         0      0.25            rounded rectangle RoundRectXSec_Radius=0.0133949 RoundedRect_Height=0.05 RoundedRect_Width=0.25

Wing "Angle4", child of "Grid Fin"
  location (X Y Z) 51.9876 6.40817 2.40072, rotation 75 0 0; relative location 0 2.25 -1.125, rotation 45 0 0
  bounding box size 0.25 0.871854 3.0865
  mass: Density=8000 Shell_Flag=0 Mass_Area=1 Mass_Prior=0
  totals: TotalSpan=3.18198 TotalProjectedSpan=3.18198 TotalChord=0.25 TotalArea=0.795496 TotalAR=12.7279
  root: chord 0.25, twist 0, rounded rectangle RoundRectXSec_Radius=0.025 RoundedRect_Height=0.05 RoundedRect_Width=0.25
  sections:
    n  Span     Root_Chord  Tip_Chord  Area      Sweep  Sweep_Location  Dihedral  Twist  Twist_Location  tip airfoil
    1  3.18198  0.25        0.25       0.795496  0      0               0         0      0.25            rounded rectangle RoundRectXSec_Radius=0.0133949 RoundedRect_Height=0.05 RoundedRect_Width=0.25

Wing "Angle6", child of "Grid Fin"
  location (X Y Z) 51.9876 7.38245 2.96322, rotation 75 0 0; relative location 0 3.375 -1.125, rotation 45 0 0
  bounding box size 0.25 0.460075 1.54972
  mass: Density=8000 Shell_Flag=0 Mass_Area=1 Mass_Prior=0
  totals: TotalSpan=1.59099 TotalProjectedSpan=1.59099 TotalChord=0.25 TotalArea=0.397748 TotalAR=6.36396
  root: chord 0.25, twist 0, rounded rectangle RoundRectXSec_Radius=0.025 RoundedRect_Height=0.05 RoundedRect_Width=0.25
  sections:
    n  Span     Root_Chord  Tip_Chord  Area      Sweep  Sweep_Location  Dihedral  Twist  Twist_Location  tip airfoil
    1  1.59099  0.25        0.25       0.397748  0      0               0         0      0.25            rounded rectangle RoundRectXSec_Radius=0.0133949 RoundedRect_Height=0.05 RoundedRect_Width=0.25

Wing "Angle8", child of "Grid Fin"
  location (X Y Z) 51.9876 3.33461 3.22428, rotation -15 0 0; relative location 0 0 1.125, rotation -45 0 0
  bounding box size 0.25 3.0865 0.871854
  mass: Density=8000 Shell_Flag=0 Mass_Area=1 Mass_Prior=0
  totals: TotalSpan=3.18198 TotalProjectedSpan=3.18198 TotalChord=0.25 TotalArea=0.795496 TotalAR=12.7279
  root: chord 0.25, twist 0, rounded rectangle RoundRectXSec_Radius=0.025 RoundedRect_Height=0.05 RoundedRect_Width=0.25
  sections:
    n  Span     Root_Chord  Tip_Chord  Area      Sweep  Sweep_Location  Dihedral  Twist  Twist_Location  tip airfoil
    1  3.18198  0.25        0.25       0.795496  0      0               0         0      0.25            rounded rectangle RoundRectXSec_Radius=0.0133949 RoundedRect_Height=0.05 RoundedRect_Width=0.25

Wing "Angle9", child of "Grid Fin"
  location (X Y Z) 51.9876 4.34108 3.80536, rotation -15 0 0; relative location 0 1.16216 1.125, rotation -45 0 0
  bounding box size 0.25 3.0865 0.871854
  mass: Density=8000 Shell_Flag=0 Mass_Area=1 Mass_Prior=0
  totals: TotalSpan=3.18198 TotalProjectedSpan=3.18198 TotalChord=0.25 TotalArea=0.795496 TotalAR=12.7279
  root: chord 0.25, twist 0, rounded rectangle RoundRectXSec_Radius=0.025 RoundedRect_Height=0.05 RoundedRect_Width=0.25
  sections:
    n  Span     Root_Chord  Tip_Chord  Area      Sweep  Sweep_Location  Dihedral  Twist  Twist_Location  tip airfoil
    1  3.18198  0.25        0.25       0.795496  0      0               0         0      0.25            rounded rectangle RoundRectXSec_Radius=0.0133949 RoundedRect_Height=0.05 RoundedRect_Width=0.25

Wing "Angle11", child of "Grid Fin"
  location (X Y Z) 51.9876 5.28317 4.34928, rotation -15 0 0; relative location 0 2.25 1.125, rotation -45 0 0
  bounding box size 0.25 3.0865 0.871854
  mass: Density=8000 Shell_Flag=0 Mass_Area=1 Mass_Prior=0
  totals: TotalSpan=3.18198 TotalProjectedSpan=3.18198 TotalChord=0.25 TotalArea=0.795496 TotalAR=12.7279
  root: chord 0.25, twist 0, rounded rectangle RoundRectXSec_Radius=0.025 RoundedRect_Height=0.05 RoundedRect_Width=0.25
  sections:
    n  Span     Root_Chord  Tip_Chord  Area      Sweep  Sweep_Location  Dihedral  Twist  Twist_Location  tip airfoil
    1  3.18198  0.25        0.25       0.795496  0      0               0         0      0.25            rounded rectangle RoundRectXSec_Radius=0.0133949 RoundedRect_Height=0.05 RoundedRect_Width=0.25

Wing "Angle10", child of "Grid Fin"
  location (X Y Z) 51.9876 5.46608 1.8568, rotation 75 0 0; relative location 0 1.16216 -1.125, rotation 45 0 0
  bounding box size 0.25 0.871854 3.0865
  mass: Density=8000 Shell_Flag=0 Mass_Area=1 Mass_Prior=0
  totals: TotalSpan=3.18198 TotalProjectedSpan=3.18198 TotalChord=0.25 TotalArea=0.795496 TotalAR=12.7279
  root: chord 0.25, twist 0, rounded rectangle RoundRectXSec_Radius=0.025 RoundedRect_Height=0.05 RoundedRect_Width=0.25
  sections:
    n  Span     Root_Chord  Tip_Chord  Area      Sweep  Sweep_Location  Dihedral  Twist  Twist_Location  tip airfoil
    1  3.18198  0.25        0.25       0.795496  0      0               0         0      0.25            rounded rectangle RoundRectXSec_Radius=0.0133949 RoundedRect_Height=0.05 RoundedRect_Width=0.25

Wing "Angle12", child of "Grid Fin"
  location (X Y Z) 51.9876 3.89711 2.25, rotation -15 0 0; relative location 0 0 0, rotation -45 0 0
  bounding box size 0.25 1.54972 0.460075
  mass: Density=8000 Shell_Flag=0 Mass_Area=1 Mass_Prior=0
  totals: TotalSpan=1.59099 TotalProjectedSpan=1.59099 TotalChord=0.25 TotalArea=0.397748 TotalAR=6.36396
  root: chord 0.25, twist 0, rounded rectangle RoundRectXSec_Radius=0.025 RoundedRect_Height=0.05 RoundedRect_Width=0.25
  sections:
    n  Span     Root_Chord  Tip_Chord  Area      Sweep  Sweep_Location  Dihedral  Twist  Twist_Location  tip airfoil
    1  1.59099  0.25        0.25       0.397748  0      0               0         0      0.25            rounded rectangle RoundRectXSec_Radius=0.0133949 RoundedRect_Height=0.05 RoundedRect_Width=0.25

Wing "Angle13", child of "Grid Fin"
  location (X Y Z) 51.9876 6.25745 4.91178, rotation -15 0 0; relative location 0 3.375 1.125, rotation -45 0 0
  bounding box size 0.25 1.54972 0.460075
  mass: Density=8000 Shell_Flag=0 Mass_Area=1 Mass_Prior=0
  totals: TotalSpan=1.59099 TotalProjectedSpan=1.59099 TotalChord=0.25 TotalArea=0.397748 TotalAR=6.36396
  root: chord 0.25, twist 0, rounded rectangle RoundRectXSec_Radius=0.025 RoundedRect_Height=0.05 RoundedRect_Width=0.25
  sections:
    n  Span     Root_Chord  Tip_Chord  Area      Sweep  Sweep_Location  Dihedral  Twist  Twist_Location  tip airfoil
    1  1.59099  0.25        0.25       0.397748  0      0               0         0      0.25            rounded rectangle RoundRectXSec_Radius=0.0133949 RoundedRect_Height=0.05 RoundedRect_Width=0.25

Blank "GridFins_Assy", child of "SuperHeavy Fuse"
  location (X Y Z) 49.9876 0 0, rotation -30 0 0; relative location 0 0 0, rotation -30 0 0

Blank "Grid Fin", child of "GridFins_Assy"
  location (X Y Z) 51.9876 3.89711 -2.25, rotation -30 0 0; relative location 2 4.5 0, rotation 0 0 0

Wing "Long Walls", child of "Grid Fin"
  location (X Y Z) 51.9876 4.45961 -1.27572, rotation -30 0 0; relative location 0 0 1.125, rotation 0 0 0
  symmetric about XY
  bounding box size 0.25 5.04711 4.24186
  mass: Density=8000 Shell_Flag=0 Mass_Area=1 Mass_Prior=0
  totals: TotalSpan=9 TotalProjectedSpan=9 TotalChord=0.25 TotalArea=2.25 TotalAR=36
  root: chord 0.25, twist 0, rounded rectangle RoundRectXSec_Radius=0.025 RoundedRect_Height=0.05 RoundedRect_Width=0.25
  sections:
    n  Span  Root_Chord  Tip_Chord  Area   Sweep  Sweep_Location  Dihedral  Twist  Twist_Location  tip airfoil
    1  4.5   0.25        0.25       1.125  0      0               0         0      0.25            rounded rectangle RoundRectXSec_Radius=0.0133949 RoundedRect_Height=0.05 RoundedRect_Width=0.25

Wing "Short Walls", child of "Grid Fin"
  location (X Y Z) 51.9876 3.33461 -3.22428, rotation 60 0 0; relative location 0 0 -1.125, rotation 90 0 0
  bounding box size 0.25 1.1683 1.97356
  mass: Density=8000 Shell_Flag=0 Mass_Area=1 Mass_Prior=0
  totals: TotalSpan=2.25 TotalProjectedSpan=2.25 TotalChord=0.25 TotalArea=0.5625 TotalAR=9
  root: chord 0.25, twist 0, rounded rectangle RoundRectXSec_Radius=0.025 RoundedRect_Height=0.05 RoundedRect_Width=0.25
  sections:
    n  Span  Root_Chord  Tip_Chord  Area    Sweep  Sweep_Location  Dihedral  Twist  Twist_Location  tip airfoil
    1  2.25  0.25        0.25       0.5625  0      0               0         0      0.25            rounded rectangle RoundRectXSec_Radius=0.0133949 RoundedRect_Height=0.05 RoundedRect_Width=0.25

Wing "Short Walls", child of "Grid Fin"
  location (X Y Z) 51.9876 7.23173 -5.47428, rotation 60 0 0; relative location 0 4.5 -1.125, rotation 90 0 0
  bounding box size 0.25 1.1683 1.97356
  mass: Density=8000 Shell_Flag=0 Mass_Area=1 Mass_Prior=0
  totals: TotalSpan=2.25 TotalProjectedSpan=2.25 TotalChord=0.25 TotalArea=0.5625 TotalAR=9
  root: chord 0.25, twist 0, rounded rectangle RoundRectXSec_Radius=0.025 RoundedRect_Height=0.05 RoundedRect_Width=0.25
  sections:
    n  Span  Root_Chord  Tip_Chord  Area    Sweep  Sweep_Location  Dihedral  Twist  Twist_Location  tip airfoil
    1  2.25  0.25        0.25       0.5625  0      0               0         0      0.25            rounded rectangle RoundRectXSec_Radius=0.0133949 RoundedRect_Height=0.05 RoundedRect_Width=0.25

Wing "Angle0", child of "Grid Fin"
  location (X Y Z) 51.9876 3.89711 -2.25, rotation 15 0 0; relative location 0 0 0, rotation 45 0 0
  bounding box size 0.25 1.54972 0.460075
  mass: Density=8000 Shell_Flag=0 Mass_Area=1 Mass_Prior=0
  totals: TotalSpan=1.59099 TotalProjectedSpan=1.59099 TotalChord=0.25 TotalArea=0.397748 TotalAR=6.36396
  root: chord 0.25, twist 0, rounded rectangle RoundRectXSec_Radius=0.025 RoundedRect_Height=0.05 RoundedRect_Width=0.25
  sections:
    n  Span     Root_Chord  Tip_Chord  Area      Sweep  Sweep_Location  Dihedral  Twist  Twist_Location  tip airfoil
    1  1.59099  0.25        0.25       0.397748  0      0               0         0      0.25            rounded rectangle RoundRectXSec_Radius=0.0133949 RoundedRect_Height=0.05 RoundedRect_Width=0.25

Wing "Angle1", child of "Grid Fin"
  location (X Y Z) 51.9876 3.33461 -3.22428, rotation 15 0 0; relative location 0 0 -1.125, rotation 45 0 0
  bounding box size 0.25 3.0865 0.871854
  mass: Density=8000 Shell_Flag=0 Mass_Area=1 Mass_Prior=0
  totals: TotalSpan=3.18198 TotalProjectedSpan=3.18198 TotalChord=0.25 TotalArea=0.795496 TotalAR=12.7279
  root: chord 0.25, twist 0, rounded rectangle RoundRectXSec_Radius=0.025 RoundedRect_Height=0.05 RoundedRect_Width=0.25
  sections:
    n  Span     Root_Chord  Tip_Chord  Area      Sweep  Sweep_Location  Dihedral  Twist  Twist_Location  tip airfoil
    1  3.18198  0.25        0.25       0.795496  0      0               0         0      0.25            rounded rectangle RoundRectXSec_Radius=0.0133949 RoundedRect_Height=0.05 RoundedRect_Width=0.25

Wing "Angle4", child of "Grid Fin"
  location (X Y Z) 51.9876 5.28317 -4.34928, rotation 15 0 0; relative location 0 2.25 -1.125, rotation 45 0 0
  bounding box size 0.25 3.0865 0.871854
  mass: Density=8000 Shell_Flag=0 Mass_Area=1 Mass_Prior=0
  totals: TotalSpan=3.18198 TotalProjectedSpan=3.18198 TotalChord=0.25 TotalArea=0.795496 TotalAR=12.7279
  root: chord 0.25, twist 0, rounded rectangle RoundRectXSec_Radius=0.025 RoundedRect_Height=0.05 RoundedRect_Width=0.25
  sections:
    n  Span     Root_Chord  Tip_Chord  Area      Sweep  Sweep_Location  Dihedral  Twist  Twist_Location  tip airfoil
    1  3.18198  0.25        0.25       0.795496  0      0               0         0      0.25            rounded rectangle RoundRectXSec_Radius=0.0133949 RoundedRect_Height=0.05 RoundedRect_Width=0.25

Wing "Angle6", child of "Grid Fin"
  location (X Y Z) 51.9876 6.25745 -4.91178, rotation 15 0 0; relative location 0 3.375 -1.125, rotation 45 0 0
  bounding box size 0.25 1.54972 0.460075
  mass: Density=8000 Shell_Flag=0 Mass_Area=1 Mass_Prior=0
  totals: TotalSpan=1.59099 TotalProjectedSpan=1.59099 TotalChord=0.25 TotalArea=0.397748 TotalAR=6.36396
  root: chord 0.25, twist 0, rounded rectangle RoundRectXSec_Radius=0.025 RoundedRect_Height=0.05 RoundedRect_Width=0.25
  sections:
    n  Span     Root_Chord  Tip_Chord  Area      Sweep  Sweep_Location  Dihedral  Twist  Twist_Location  tip airfoil
    1  1.59099  0.25        0.25       0.397748  0      0               0         0      0.25            rounded rectangle RoundRectXSec_Radius=0.0133949 RoundedRect_Height=0.05 RoundedRect_Width=0.25

Wing "Angle8", child of "Grid Fin"
  location (X Y Z) 51.9876 4.45961 -1.27572, rotation -75 0 0; relative location 0 0 1.125, rotation -45 0 0
  bounding box size 0.25 0.871854 3.0865
  mass: Density=8000 Shell_Flag=0 Mass_Area=1 Mass_Prior=0
  totals: TotalSpan=3.18198 TotalProjectedSpan=3.18198 TotalChord=0.25 TotalArea=0.795496 TotalAR=12.7279
  root: chord 0.25, twist 0, rounded rectangle RoundRectXSec_Radius=0.025 RoundedRect_Height=0.05 RoundedRect_Width=0.25
  sections:
    n  Span     Root_Chord  Tip_Chord  Area      Sweep  Sweep_Location  Dihedral  Twist  Twist_Location  tip airfoil
    1  3.18198  0.25        0.25       0.795496  0      0               0         0      0.25            rounded rectangle RoundRectXSec_Radius=0.0133949 RoundedRect_Height=0.05 RoundedRect_Width=0.25

Wing "Angle9", child of "Grid Fin"
  location (X Y Z) 51.9876 5.46608 -1.8568, rotation -75 0 0; relative location 0 1.16216 1.125, rotation -45 0 0
  bounding box size 0.25 0.871854 3.0865
  mass: Density=8000 Shell_Flag=0 Mass_Area=1 Mass_Prior=0
  totals: TotalSpan=3.18198 TotalProjectedSpan=3.18198 TotalChord=0.25 TotalArea=0.795496 TotalAR=12.7279
  root: chord 0.25, twist 0, rounded rectangle RoundRectXSec_Radius=0.025 RoundedRect_Height=0.05 RoundedRect_Width=0.25
  sections:
    n  Span     Root_Chord  Tip_Chord  Area      Sweep  Sweep_Location  Dihedral  Twist  Twist_Location  tip airfoil
    1  3.18198  0.25        0.25       0.795496  0      0               0         0      0.25            rounded rectangle RoundRectXSec_Radius=0.0133949 RoundedRect_Height=0.05 RoundedRect_Width=0.25

Wing "Angle11", child of "Grid Fin"
  location (X Y Z) 51.9876 6.40817 -2.40072, rotation -75 0 0; relative location 0 2.25 1.125, rotation -45 0 0
  bounding box size 0.25 0.871854 3.0865
  mass: Density=8000 Shell_Flag=0 Mass_Area=1 Mass_Prior=0
  totals: TotalSpan=3.18198 TotalProjectedSpan=3.18198 TotalChord=0.25 TotalArea=0.795496 TotalAR=12.7279
  root: chord 0.25, twist 0, rounded rectangle RoundRectXSec_Radius=0.025 RoundedRect_Height=0.05 RoundedRect_Width=0.25
  sections:
    n  Span     Root_Chord  Tip_Chord  Area      Sweep  Sweep_Location  Dihedral  Twist  Twist_Location  tip airfoil
    1  3.18198  0.25        0.25       0.795496  0      0               0         0      0.25            rounded rectangle RoundRectXSec_Radius=0.0133949 RoundedRect_Height=0.05 RoundedRect_Width=0.25

Wing "Angle10", child of "Grid Fin"
  location (X Y Z) 51.9876 4.34108 -3.80536, rotation 15 0 0; relative location 0 1.16216 -1.125, rotation 45 0 0
  bounding box size 0.25 3.0865 0.871854
  mass: Density=8000 Shell_Flag=0 Mass_Area=1 Mass_Prior=0
  totals: TotalSpan=3.18198 TotalProjectedSpan=3.18198 TotalChord=0.25 TotalArea=0.795496 TotalAR=12.7279
  root: chord 0.25, twist 0, rounded rectangle RoundRectXSec_Radius=0.025 RoundedRect_Height=0.05 RoundedRect_Width=0.25
  sections:
    n  Span     Root_Chord  Tip_Chord  Area      Sweep  Sweep_Location  Dihedral  Twist  Twist_Location  tip airfoil
    1  3.18198  0.25        0.25       0.795496  0      0               0         0      0.25            rounded rectangle RoundRectXSec_Radius=0.0133949 RoundedRect_Height=0.05 RoundedRect_Width=0.25

Wing "Angle12", child of "Grid Fin"
  location (X Y Z) 51.9876 3.89711 -2.25, rotation -75 0 0; relative location 0 0 0, rotation -45 0 0
  bounding box size 0.25 0.460075 1.54972
  mass: Density=8000 Shell_Flag=0 Mass_Area=1 Mass_Prior=0
  totals: TotalSpan=1.59099 TotalProjectedSpan=1.59099 TotalChord=0.25 TotalArea=0.397748 TotalAR=6.36396
  root: chord 0.25, twist 0, rounded rectangle RoundRectXSec_Radius=0.025 RoundedRect_Height=0.05 RoundedRect_Width=0.25
  sections:
    n  Span     Root_Chord  Tip_Chord  Area      Sweep  Sweep_Location  Dihedral  Twist  Twist_Location  tip airfoil
    1  1.59099  0.25        0.25       0.397748  0      0               0         0      0.25            rounded rectangle RoundRectXSec_Radius=0.0133949 RoundedRect_Height=0.05 RoundedRect_Width=0.25

Wing "Angle13", child of "Grid Fin"
  location (X Y Z) 51.9876 7.38245 -2.96322, rotation -75 0 0; relative location 0 3.375 1.125, rotation -45 0 0
  bounding box size 0.25 0.460075 1.54972
  mass: Density=8000 Shell_Flag=0 Mass_Area=1 Mass_Prior=0
  totals: TotalSpan=1.59099 TotalProjectedSpan=1.59099 TotalChord=0.25 TotalArea=0.397748 TotalAR=6.36396
  root: chord 0.25, twist 0, rounded rectangle RoundRectXSec_Radius=0.025 RoundedRect_Height=0.05 RoundedRect_Width=0.25
  sections:
    n  Span     Root_Chord  Tip_Chord  Area      Sweep  Sweep_Location  Dihedral  Twist  Twist_Location  tip airfoil
    1  1.59099  0.25        0.25       0.397748  0      0               0         0      0.25            rounded rectangle RoundRectXSec_Radius=0.0133949 RoundedRect_Height=0.05 RoundedRect_Width=0.25

Blank "GridFins_Assy", child of "SuperHeavy Fuse"
  location (X Y Z) 49.9876 0 0, rotation 150 0 0; relative location 0 0 0, rotation 150 0 0

Blank "Grid Fin", child of "GridFins_Assy"
  location (X Y Z) 51.9876 -3.89711 2.25, rotation 150 0 0; relative location 2 4.5 0, rotation 0 0 0

Wing "Long Walls", child of "Grid Fin"
  location (X Y Z) 51.9876 -4.45961 1.27572, rotation 150 0 0; relative location 0 0 1.125, rotation 0 0 0
  symmetric about XY
  bounding box size 0.25 5.04711 4.24186
  mass: Density=8000 Shell_Flag=0 Mass_Area=1 Mass_Prior=0
  totals: TotalSpan=9 TotalProjectedSpan=9 TotalChord=0.25 TotalArea=2.25 TotalAR=36
  root: chord 0.25, twist 0, rounded rectangle RoundRectXSec_Radius=0.025 RoundedRect_Height=0.05 RoundedRect_Width=0.25
  sections:
    n  Span  Root_Chord  Tip_Chord  Area   Sweep  Sweep_Location  Dihedral  Twist  Twist_Location  tip airfoil
    1  4.5   0.25        0.25       1.125  0      0               0         0      0.25            rounded rectangle RoundRectXSec_Radius=0.0133949 RoundedRect_Height=0.05 RoundedRect_Width=0.25

Wing "Short Walls", child of "Grid Fin"
  location (X Y Z) 51.9876 -3.33461 3.22428, rotation -120 0 0; relative location 0 0 -1.125, rotation 90 0 0
  bounding box size 0.25 1.1683 1.97356
  mass: Density=8000 Shell_Flag=0 Mass_Area=1 Mass_Prior=0
  totals: TotalSpan=2.25 TotalProjectedSpan=2.25 TotalChord=0.25 TotalArea=0.5625 TotalAR=9
  root: chord 0.25, twist 0, rounded rectangle RoundRectXSec_Radius=0.025 RoundedRect_Height=0.05 RoundedRect_Width=0.25
  sections:
    n  Span  Root_Chord  Tip_Chord  Area    Sweep  Sweep_Location  Dihedral  Twist  Twist_Location  tip airfoil
    1  2.25  0.25        0.25       0.5625  0      0               0         0      0.25            rounded rectangle RoundRectXSec_Radius=0.0133949 RoundedRect_Height=0.05 RoundedRect_Width=0.25

Wing "Short Walls", child of "Grid Fin"
  location (X Y Z) 51.9876 -7.23173 5.47428, rotation -120 0 0; relative location 0 4.5 -1.125, rotation 90 0 0
  bounding box size 0.25 1.1683 1.97356
  mass: Density=8000 Shell_Flag=0 Mass_Area=1 Mass_Prior=0
  totals: TotalSpan=2.25 TotalProjectedSpan=2.25 TotalChord=0.25 TotalArea=0.5625 TotalAR=9
  root: chord 0.25, twist 0, rounded rectangle RoundRectXSec_Radius=0.025 RoundedRect_Height=0.05 RoundedRect_Width=0.25
  sections:
    n  Span  Root_Chord  Tip_Chord  Area    Sweep  Sweep_Location  Dihedral  Twist  Twist_Location  tip airfoil
    1  2.25  0.25        0.25       0.5625  0      0               0         0      0.25            rounded rectangle RoundRectXSec_Radius=0.0133949 RoundedRect_Height=0.05 RoundedRect_Width=0.25

Wing "Angle0", child of "Grid Fin"
  location (X Y Z) 51.9876 -3.89711 2.25, rotation -165 0 0; relative location 0 0 0, rotation 45 0 0
  bounding box size 0.25 1.54972 0.460075
  mass: Density=8000 Shell_Flag=0 Mass_Area=1 Mass_Prior=0
  totals: TotalSpan=1.59099 TotalProjectedSpan=1.59099 TotalChord=0.25 TotalArea=0.397748 TotalAR=6.36396
  root: chord 0.25, twist 0, rounded rectangle RoundRectXSec_Radius=0.025 RoundedRect_Height=0.05 RoundedRect_Width=0.25
  sections:
    n  Span     Root_Chord  Tip_Chord  Area      Sweep  Sweep_Location  Dihedral  Twist  Twist_Location  tip airfoil
    1  1.59099  0.25        0.25       0.397748  0      0               0         0      0.25            rounded rectangle RoundRectXSec_Radius=0.0133949 RoundedRect_Height=0.05 RoundedRect_Width=0.25

Wing "Angle1", child of "Grid Fin"
  location (X Y Z) 51.9876 -3.33461 3.22428, rotation -165 0 0; relative location 0 0 -1.125, rotation 45 0 0
  bounding box size 0.25 3.0865 0.871854
  mass: Density=8000 Shell_Flag=0 Mass_Area=1 Mass_Prior=0
  totals: TotalSpan=3.18198 TotalProjectedSpan=3.18198 TotalChord=0.25 TotalArea=0.795496 TotalAR=12.7279
  root: chord 0.25, twist 0, rounded rectangle RoundRectXSec_Radius=0.025 RoundedRect_Height=0.05 RoundedRect_Width=0.25
  sections:
    n  Span     Root_Chord  Tip_Chord  Area      Sweep  Sweep_Location  Dihedral  Twist  Twist_Location  tip airfoil
    1  3.18198  0.25        0.25       0.795496  0      0               0         0      0.25            rounded rectangle RoundRectXSec_Radius=0.0133949 RoundedRect_Height=0.05 RoundedRect_Width=0.25

Wing "Angle4", child of "Grid Fin"
  location (X Y Z) 51.9876 -5.28317 4.34928, rotation -165 0 0; relative location 0 2.25 -1.125, rotation 45 0 0
  bounding box size 0.25 3.0865 0.871854
  mass: Density=8000 Shell_Flag=0 Mass_Area=1 Mass_Prior=0
  totals: TotalSpan=3.18198 TotalProjectedSpan=3.18198 TotalChord=0.25 TotalArea=0.795496 TotalAR=12.7279
  root: chord 0.25, twist 0, rounded rectangle RoundRectXSec_Radius=0.025 RoundedRect_Height=0.05 RoundedRect_Width=0.25
  sections:
    n  Span     Root_Chord  Tip_Chord  Area      Sweep  Sweep_Location  Dihedral  Twist  Twist_Location  tip airfoil
    1  3.18198  0.25        0.25       0.795496  0      0               0         0      0.25            rounded rectangle RoundRectXSec_Radius=0.0133949 RoundedRect_Height=0.05 RoundedRect_Width=0.25

Wing "Angle6", child of "Grid Fin"
  location (X Y Z) 51.9876 -6.25745 4.91178, rotation -165 0 0; relative location 0 3.375 -1.125, rotation 45 0 0
  bounding box size 0.25 1.54972 0.460075
  mass: Density=8000 Shell_Flag=0 Mass_Area=1 Mass_Prior=0
  totals: TotalSpan=1.59099 TotalProjectedSpan=1.59099 TotalChord=0.25 TotalArea=0.397748 TotalAR=6.36396
  root: chord 0.25, twist 0, rounded rectangle RoundRectXSec_Radius=0.025 RoundedRect_Height=0.05 RoundedRect_Width=0.25
  sections:
    n  Span     Root_Chord  Tip_Chord  Area      Sweep  Sweep_Location  Dihedral  Twist  Twist_Location  tip airfoil
    1  1.59099  0.25        0.25       0.397748  0      0               0         0      0.25            rounded rectangle RoundRectXSec_Radius=0.0133949 RoundedRect_Height=0.05 RoundedRect_Width=0.25

Wing "Angle8", child of "Grid Fin"
  location (X Y Z) 51.9876 -4.45961 1.27572, rotation 105 0 0; relative location 0 0 1.125, rotation -45 0 0
  bounding box size 0.25 0.871854 3.0865
  mass: Density=8000 Shell_Flag=0 Mass_Area=1 Mass_Prior=0
  totals: TotalSpan=3.18198 TotalProjectedSpan=3.18198 TotalChord=0.25 TotalArea=0.795496 TotalAR=12.7279
  root: chord 0.25, twist 0, rounded rectangle RoundRectXSec_Radius=0.025 RoundedRect_Height=0.05 RoundedRect_Width=0.25
  sections:
    n  Span     Root_Chord  Tip_Chord  Area      Sweep  Sweep_Location  Dihedral  Twist  Twist_Location  tip airfoil
    1  3.18198  0.25        0.25       0.795496  0      0               0         0      0.25            rounded rectangle RoundRectXSec_Radius=0.0133949 RoundedRect_Height=0.05 RoundedRect_Width=0.25

Wing "Angle9", child of "Grid Fin"
  location (X Y Z) 51.9876 -5.46608 1.8568, rotation 105 0 0; relative location 0 1.16216 1.125, rotation -45 0 0
  bounding box size 0.25 0.871854 3.0865
  mass: Density=8000 Shell_Flag=0 Mass_Area=1 Mass_Prior=0
  totals: TotalSpan=3.18198 TotalProjectedSpan=3.18198 TotalChord=0.25 TotalArea=0.795496 TotalAR=12.7279
  root: chord 0.25, twist 0, rounded rectangle RoundRectXSec_Radius=0.025 RoundedRect_Height=0.05 RoundedRect_Width=0.25
  sections:
    n  Span     Root_Chord  Tip_Chord  Area      Sweep  Sweep_Location  Dihedral  Twist  Twist_Location  tip airfoil
    1  3.18198  0.25        0.25       0.795496  0      0               0         0      0.25            rounded rectangle RoundRectXSec_Radius=0.0133949 RoundedRect_Height=0.05 RoundedRect_Width=0.25

Wing "Angle11", child of "Grid Fin"
  location (X Y Z) 51.9876 -6.40817 2.40072, rotation 105 0 0; relative location 0 2.25 1.125, rotation -45 0 0
  bounding box size 0.25 0.871854 3.0865
  mass: Density=8000 Shell_Flag=0 Mass_Area=1 Mass_Prior=0
  totals: TotalSpan=3.18198 TotalProjectedSpan=3.18198 TotalChord=0.25 TotalArea=0.795496 TotalAR=12.7279
  root: chord 0.25, twist 0, rounded rectangle RoundRectXSec_Radius=0.025 RoundedRect_Height=0.05 RoundedRect_Width=0.25
  sections:
    n  Span     Root_Chord  Tip_Chord  Area      Sweep  Sweep_Location  Dihedral  Twist  Twist_Location  tip airfoil
    1  3.18198  0.25        0.25       0.795496  0      0               0         0      0.25            rounded rectangle RoundRectXSec_Radius=0.0133949 RoundedRect_Height=0.05 RoundedRect_Width=0.25

Wing "Angle10", child of "Grid Fin"
  location (X Y Z) 51.9876 -4.34108 3.80536, rotation -165 0 0; relative location 0 1.16216 -1.125, rotation 45 0 0
  bounding box size 0.25 3.0865 0.871854
  mass: Density=8000 Shell_Flag=0 Mass_Area=1 Mass_Prior=0
  totals: TotalSpan=3.18198 TotalProjectedSpan=3.18198 TotalChord=0.25 TotalArea=0.795496 TotalAR=12.7279
  root: chord 0.25, twist 0, rounded rectangle RoundRectXSec_Radius=0.025 RoundedRect_Height=0.05 RoundedRect_Width=0.25
  sections:
    n  Span     Root_Chord  Tip_Chord  Area      Sweep  Sweep_Location  Dihedral  Twist  Twist_Location  tip airfoil
    1  3.18198  0.25        0.25       0.795496  0      0               0         0      0.25            rounded rectangle RoundRectXSec_Radius=0.0133949 RoundedRect_Height=0.05 RoundedRect_Width=0.25

Wing "Angle12", child of "Grid Fin"
  location (X Y Z) 51.9876 -3.89711 2.25, rotation 105 0 0; relative location 0 0 0, rotation -45 0 0
  bounding box size 0.25 0.460075 1.54972
  mass: Density=8000 Shell_Flag=0 Mass_Area=1 Mass_Prior=0
  totals: TotalSpan=1.59099 TotalProjectedSpan=1.59099 TotalChord=0.25 TotalArea=0.397748 TotalAR=6.36396
  root: chord 0.25, twist 0, rounded rectangle RoundRectXSec_Radius=0.025 RoundedRect_Height=0.05 RoundedRect_Width=0.25
  sections:
    n  Span     Root_Chord  Tip_Chord  Area      Sweep  Sweep_Location  Dihedral  Twist  Twist_Location  tip airfoil
    1  1.59099  0.25        0.25       0.397748  0      0               0         0      0.25            rounded rectangle RoundRectXSec_Radius=0.0133949 RoundedRect_Height=0.05 RoundedRect_Width=0.25

Wing "Angle13", child of "Grid Fin"
  location (X Y Z) 51.9876 -7.38245 2.96322, rotation 105 0 0; relative location 0 3.375 1.125, rotation -45 0 0
  bounding box size 0.25 0.460075 1.54972
  mass: Density=8000 Shell_Flag=0 Mass_Area=1 Mass_Prior=0
  totals: TotalSpan=1.59099 TotalProjectedSpan=1.59099 TotalChord=0.25 TotalArea=0.397748 TotalAR=6.36396
  root: chord 0.25, twist 0, rounded rectangle RoundRectXSec_Radius=0.025 RoundedRect_Height=0.05 RoundedRect_Width=0.25
  sections:
    n  Span     Root_Chord  Tip_Chord  Area      Sweep  Sweep_Location  Dihedral  Twist  Twist_Location  tip airfoil
    1  1.59099  0.25        0.25       0.397748  0      0               0         0      0.25            rounded rectangle RoundRectXSec_Radius=0.0133949 RoundedRect_Height=0.05 RoundedRect_Width=0.25

Blank "GridFins_Assy", child of "SuperHeavy Fuse"
  location (X Y Z) 49.9876 0 0, rotation -150 0 0; relative location 0 0 0, rotation -150 0 0

Blank "Grid Fin", child of "GridFins_Assy"
  location (X Y Z) 51.9876 -3.89711 -2.25, rotation -150 0 0; relative location 2 4.5 0, rotation 0 0 0

Wing "Long Walls", child of "Grid Fin"
  location (X Y Z) 51.9876 -3.33461 -3.22428, rotation -150 0 0; relative location 0 0 1.125, rotation 0 0 0
  symmetric about XY
  bounding box size 0.25 5.04711 4.24186
  mass: Density=8000 Shell_Flag=0 Mass_Area=1 Mass_Prior=0
  totals: TotalSpan=9 TotalProjectedSpan=9 TotalChord=0.25 TotalArea=2.25 TotalAR=36
  root: chord 0.25, twist 0, rounded rectangle RoundRectXSec_Radius=0.025 RoundedRect_Height=0.05 RoundedRect_Width=0.25
  sections:
    n  Span  Root_Chord  Tip_Chord  Area   Sweep  Sweep_Location  Dihedral  Twist  Twist_Location  tip airfoil
    1  4.5   0.25        0.25       1.125  0      0               0         0      0.25            rounded rectangle RoundRectXSec_Radius=0.0133949 RoundedRect_Height=0.05 RoundedRect_Width=0.25

Wing "Short Walls", child of "Grid Fin"
  location (X Y Z) 51.9876 -4.45961 -1.27572, rotation -60 0 0; relative location 0 0 -1.125, rotation 90 0 0
  bounding box size 0.25 1.1683 1.97356
  mass: Density=8000 Shell_Flag=0 Mass_Area=1 Mass_Prior=0
  totals: TotalSpan=2.25 TotalProjectedSpan=2.25 TotalChord=0.25 TotalArea=0.5625 TotalAR=9
  root: chord 0.25, twist 0, rounded rectangle RoundRectXSec_Radius=0.025 RoundedRect_Height=0.05 RoundedRect_Width=0.25
  sections:
    n  Span  Root_Chord  Tip_Chord  Area    Sweep  Sweep_Location  Dihedral  Twist  Twist_Location  tip airfoil
    1  2.25  0.25        0.25       0.5625  0      0               0         0      0.25            rounded rectangle RoundRectXSec_Radius=0.0133949 RoundedRect_Height=0.05 RoundedRect_Width=0.25

Wing "Short Walls", child of "Grid Fin"
  location (X Y Z) 51.9876 -8.35673 -3.52572, rotation -60 0 0; relative location 0 4.5 -1.125, rotation 90 0 0
  bounding box size 0.25 1.1683 1.97356
  mass: Density=8000 Shell_Flag=0 Mass_Area=1 Mass_Prior=0
  totals: TotalSpan=2.25 TotalProjectedSpan=2.25 TotalChord=0.25 TotalArea=0.5625 TotalAR=9
  root: chord 0.25, twist 0, rounded rectangle RoundRectXSec_Radius=0.025 RoundedRect_Height=0.05 RoundedRect_Width=0.25
  sections:
    n  Span  Root_Chord  Tip_Chord  Area    Sweep  Sweep_Location  Dihedral  Twist  Twist_Location  tip airfoil
    1  2.25  0.25        0.25       0.5625  0      0               0         0      0.25            rounded rectangle RoundRectXSec_Radius=0.0133949 RoundedRect_Height=0.05 RoundedRect_Width=0.25

Wing "Angle0", child of "Grid Fin"
  location (X Y Z) 51.9876 -3.89711 -2.25, rotation -105 0 0; relative location 0 0 0, rotation 45 0 0
  bounding box size 0.25 0.460075 1.54972
  mass: Density=8000 Shell_Flag=0 Mass_Area=1 Mass_Prior=0
  totals: TotalSpan=1.59099 TotalProjectedSpan=1.59099 TotalChord=0.25 TotalArea=0.397748 TotalAR=6.36396
  root: chord 0.25, twist 0, rounded rectangle RoundRectXSec_Radius=0.025 RoundedRect_Height=0.05 RoundedRect_Width=0.25
  sections:
    n  Span     Root_Chord  Tip_Chord  Area      Sweep  Sweep_Location  Dihedral  Twist  Twist_Location  tip airfoil
    1  1.59099  0.25        0.25       0.397748  0      0               0         0      0.25            rounded rectangle RoundRectXSec_Radius=0.0133949 RoundedRect_Height=0.05 RoundedRect_Width=0.25

Wing "Angle1", child of "Grid Fin"
  location (X Y Z) 51.9876 -4.45961 -1.27572, rotation -105 0 0; relative location 0 0 -1.125, rotation 45 0 0
  bounding box size 0.25 0.871854 3.0865
  mass: Density=8000 Shell_Flag=0 Mass_Area=1 Mass_Prior=0
  totals: TotalSpan=3.18198 TotalProjectedSpan=3.18198 TotalChord=0.25 TotalArea=0.795496 TotalAR=12.7279
  root: chord 0.25, twist 0, rounded rectangle RoundRectXSec_Radius=0.025 RoundedRect_Height=0.05 RoundedRect_Width=0.25
  sections:
    n  Span     Root_Chord  Tip_Chord  Area      Sweep  Sweep_Location  Dihedral  Twist  Twist_Location  tip airfoil
    1  3.18198  0.25        0.25       0.795496  0      0               0         0      0.25            rounded rectangle RoundRectXSec_Radius=0.0133949 RoundedRect_Height=0.05 RoundedRect_Width=0.25

Wing "Angle4", child of "Grid Fin"
  location (X Y Z) 51.9876 -6.40817 -2.40072, rotation -105 0 0; relative location 0 2.25 -1.125, rotation 45 0 0
  bounding box size 0.25 0.871854 3.0865
  mass: Density=8000 Shell_Flag=0 Mass_Area=1 Mass_Prior=0
  totals: TotalSpan=3.18198 TotalProjectedSpan=3.18198 TotalChord=0.25 TotalArea=0.795496 TotalAR=12.7279
  root: chord 0.25, twist 0, rounded rectangle RoundRectXSec_Radius=0.025 RoundedRect_Height=0.05 RoundedRect_Width=0.25
  sections:
    n  Span     Root_Chord  Tip_Chord  Area      Sweep  Sweep_Location  Dihedral  Twist  Twist_Location  tip airfoil
    1  3.18198  0.25        0.25       0.795496  0      0               0         0      0.25            rounded rectangle RoundRectXSec_Radius=0.0133949 RoundedRect_Height=0.05 RoundedRect_Width=0.25

Wing "Angle6", child of "Grid Fin"
  location (X Y Z) 51.9876 -7.38245 -2.96322, rotation -105 0 0; relative location 0 3.375 -1.125, rotation 45 0 0
  bounding box size 0.25 0.460075 1.54972
  mass: Density=8000 Shell_Flag=0 Mass_Area=1 Mass_Prior=0
  totals: TotalSpan=1.59099 TotalProjectedSpan=1.59099 TotalChord=0.25 TotalArea=0.397748 TotalAR=6.36396
  root: chord 0.25, twist 0, rounded rectangle RoundRectXSec_Radius=0.025 RoundedRect_Height=0.05 RoundedRect_Width=0.25
  sections:
    n  Span     Root_Chord  Tip_Chord  Area      Sweep  Sweep_Location  Dihedral  Twist  Twist_Location  tip airfoil
    1  1.59099  0.25        0.25       0.397748  0      0               0         0      0.25            rounded rectangle RoundRectXSec_Radius=0.0133949 RoundedRect_Height=0.05 RoundedRect_Width=0.25

Wing "Angle8", child of "Grid Fin"
  location (X Y Z) 51.9876 -3.33461 -3.22428, rotation 165 0 0; relative location 0 0 1.125, rotation -45 0 0
  bounding box size 0.25 3.0865 0.871854
  mass: Density=8000 Shell_Flag=0 Mass_Area=1 Mass_Prior=0
  totals: TotalSpan=3.18198 TotalProjectedSpan=3.18198 TotalChord=0.25 TotalArea=0.795496 TotalAR=12.7279
  root: chord 0.25, twist 0, rounded rectangle RoundRectXSec_Radius=0.025 RoundedRect_Height=0.05 RoundedRect_Width=0.25
  sections:
    n  Span     Root_Chord  Tip_Chord  Area      Sweep  Sweep_Location  Dihedral  Twist  Twist_Location  tip airfoil
    1  3.18198  0.25        0.25       0.795496  0      0               0         0      0.25            rounded rectangle RoundRectXSec_Radius=0.0133949 RoundedRect_Height=0.05 RoundedRect_Width=0.25

Wing "Angle9", child of "Grid Fin"
  location (X Y Z) 51.9876 -4.34108 -3.80536, rotation 165 0 0; relative location 0 1.16216 1.125, rotation -45 0 0
  bounding box size 0.25 3.0865 0.871854
  mass: Density=8000 Shell_Flag=0 Mass_Area=1 Mass_Prior=0
  totals: TotalSpan=3.18198 TotalProjectedSpan=3.18198 TotalChord=0.25 TotalArea=0.795496 TotalAR=12.7279
  root: chord 0.25, twist 0, rounded rectangle RoundRectXSec_Radius=0.025 RoundedRect_Height=0.05 RoundedRect_Width=0.25
  sections:
    n  Span     Root_Chord  Tip_Chord  Area      Sweep  Sweep_Location  Dihedral  Twist  Twist_Location  tip airfoil
    1  3.18198  0.25        0.25       0.795496  0      0               0         0      0.25            rounded rectangle RoundRectXSec_Radius=0.0133949 RoundedRect_Height=0.05 RoundedRect_Width=0.25

Wing "Angle11", child of "Grid Fin"
  location (X Y Z) 51.9876 -5.28317 -4.34928, rotation 165 0 0; relative location 0 2.25 1.125, rotation -45 0 0
  bounding box size 0.25 3.0865 0.871854
  mass: Density=8000 Shell_Flag=0 Mass_Area=1 Mass_Prior=0
  totals: TotalSpan=3.18198 TotalProjectedSpan=3.18198 TotalChord=0.25 TotalArea=0.795496 TotalAR=12.7279
  root: chord 0.25, twist 0, rounded rectangle RoundRectXSec_Radius=0.025 RoundedRect_Height=0.05 RoundedRect_Width=0.25
  sections:
    n  Span     Root_Chord  Tip_Chord  Area      Sweep  Sweep_Location  Dihedral  Twist  Twist_Location  tip airfoil
    1  3.18198  0.25        0.25       0.795496  0      0               0         0      0.25            rounded rectangle RoundRectXSec_Radius=0.0133949 RoundedRect_Height=0.05 RoundedRect_Width=0.25

Wing "Angle10", child of "Grid Fin"
  location (X Y Z) 51.9876 -5.46608 -1.8568, rotation -105 0 0; relative location 0 1.16216 -1.125, rotation 45 0 0
  bounding box size 0.25 0.871854 3.0865
  mass: Density=8000 Shell_Flag=0 Mass_Area=1 Mass_Prior=0
  totals: TotalSpan=3.18198 TotalProjectedSpan=3.18198 TotalChord=0.25 TotalArea=0.795496 TotalAR=12.7279
  root: chord 0.25, twist 0, rounded rectangle RoundRectXSec_Radius=0.025 RoundedRect_Height=0.05 RoundedRect_Width=0.25
  sections:
    n  Span     Root_Chord  Tip_Chord  Area      Sweep  Sweep_Location  Dihedral  Twist  Twist_Location  tip airfoil
    1  3.18198  0.25        0.25       0.795496  0      0               0         0      0.25            rounded rectangle RoundRectXSec_Radius=0.0133949 RoundedRect_Height=0.05 RoundedRect_Width=0.25

Wing "Angle12", child of "Grid Fin"
  location (X Y Z) 51.9876 -3.89711 -2.25, rotation 165 0 0; relative location 0 0 0, rotation -45 0 0
  bounding box size 0.25 1.54972 0.460075
  mass: Density=8000 Shell_Flag=0 Mass_Area=1 Mass_Prior=0
  totals: TotalSpan=1.59099 TotalProjectedSpan=1.59099 TotalChord=0.25 TotalArea=0.397748 TotalAR=6.36396
  root: chord 0.25, twist 0, rounded rectangle RoundRectXSec_Radius=0.025 RoundedRect_Height=0.05 RoundedRect_Width=0.25
  sections:
    n  Span     Root_Chord  Tip_Chord  Area      Sweep  Sweep_Location  Dihedral  Twist  Twist_Location  tip airfoil
    1  1.59099  0.25        0.25       0.397748  0      0               0         0      0.25            rounded rectangle RoundRectXSec_Radius=0.0133949 RoundedRect_Height=0.05 RoundedRect_Width=0.25

Wing "Angle13", child of "Grid Fin"
  location (X Y Z) 51.9876 -6.25745 -4.91178, rotation 165 0 0; relative location 0 3.375 1.125, rotation -45 0 0
  bounding box size 0.25 1.54972 0.460075
  mass: Density=8000 Shell_Flag=0 Mass_Area=1 Mass_Prior=0
  totals: TotalSpan=1.59099 TotalProjectedSpan=1.59099 TotalChord=0.25 TotalArea=0.397748 TotalAR=6.36396
  root: chord 0.25, twist 0, rounded rectangle RoundRectXSec_Radius=0.025 RoundedRect_Height=0.05 RoundedRect_Width=0.25
  sections:
    n  Span     Root_Chord  Tip_Chord  Area      Sweep  Sweep_Location  Dihedral  Twist  Twist_Location  tip airfoil
    1  1.59099  0.25        0.25       0.397748  0      0               0         0      0.25            rounded rectangle RoundRectXSec_Radius=0.0133949 RoundedRect_Height=0.05 RoundedRect_Width=0.25

Fuselage "CH4_Bulkhead", child of "SuperHeavy Fuse"
  location (X Y Z) 54.4876 0 0, rotation 0 0 180; relative location 4.5 0 0, rotation 0 0 180
  bounding box size 3.5 9 9
  mass: Density=1 Shell_Flag=1 Mass_Area=0.5 Mass_Prior=0
  Design: Length=3.5
  cross sections:
    n  XLocPercent  YLocPercent  ZLocPercent  shape
    0  0            0            0            circle Circle_Diameter=9
    1  0.5          0            0            circle Circle_Diameter=7.34091
    2  0.899457     0            0            circle Circle_Diameter=3.31054
    3  1            0            0            point
  structure "CH4_Bulkhead_Struct0": Skin

Stack "vol_CH4_1", child of "CH4_Bulkhead"
  location (X Y Z) 50.9876 0 0, rotation 0 0 0; relative location 3.5 0 0, rotation 0 0 180
  bounding box size 33.5017 9 9
  mass: Density=422.6 Shell_Flag=1 Mass_Area=40 Mass_Prior=1
  cross sections:
    n  XDelta  YDelta  ZDelta  shape
    0  0       0       0       point
    1  0.314   0       0       circle Circle_Diameter=3.12955
    2  1.45    0       0       circle Circle_Diameter=7.35
    3  1.75    0       0       circle Circle_Diameter=9
    4  26.5    0       0       as above
    5  1.7377  0       0       circle Circle_Diameter=7.35
    6  1.45    0       0       circle Circle_Diameter=3.12955
    7  0.3     0       0       point

Fuselage "CommonBulkhead", child of "SuperHeavy Fuse"
  location (X Y Z) 80.9876 0 0, rotation 0 0 0; relative location 31 0 0, rotation 0 0 0
  bounding box size 3.5 9 9
  Design: Length=3.5
  cross sections:
    n  XLocPercent  YLocPercent  ZLocPercent  shape
    0  0            0            0            circle Circle_Diameter=9
    1  0.5          0            0            circle Circle_Diameter=7.34091
    2  0.899457     0            0            circle Circle_Diameter=3.31054
    3  1            0            0            point

Stack "vol_LOX_1", child of "CommonBulkhead"
  location (X Y Z) 84.4876 0 0, rotation 0 0 0; relative location 3.5 0 0, rotation 0 0 0
  bounding box size 36.6127 9 9
  mass: Density=1141 Shell_Flag=1 Mass_Area=40 Mass_Prior=1
  cross sections:
    n  XDelta  YDelta  ZDelta  shape
    0  0       0       0       point
    1  -0.314  0       0       circle Circle_Diameter=3.12955
    2  -1.45   0       0       circle Circle_Diameter=7.35
    3  -1.75   0       0       circle Circle_Diameter=9
    4  33.125  0       0       as above
    5  1.7377  0       0       circle Circle_Diameter=7.35
    6  1.45    0       0       circle Circle_Diameter=3.12955
    7  0.3     0       0       point

Fuselage "ThrustBulkhead", child of "SuperHeavy Fuse"
  location (X Y Z) 114.088 0 0, rotation 0 0 0; relative location 64.1 0 0, rotation 0 0 0
  bounding box size 3.5 9 9
  Design: Length=3.5
  cross sections:
    n  XLocPercent  YLocPercent  ZLocPercent  shape
    0  0            0            0            circle Circle_Diameter=9
    1  0.5          0            0            circle Circle_Diameter=7.34091
    2  0.899457     0            0            circle Circle_Diameter=3.31054
    3  1            0            0            point

Fuselage "Raptor_SL_Center", child of "SuperHeavy Fuse"
  location (X Y Z) 116.93 0 0, rotation 0 0 0
  bounding box size 3.07 1.3 1.3
  mass: Density=574 Shell_Flag=0 Mass_Area=1 Mass_Prior=2
  Design: Length=3.07
  cross sections:
    n  XLocPercent  YLocPercent  ZLocPercent  shape
    0  0            0            0            point
    1  0            0            0            circle Circle_Diameter=0.8
    2  0.03         0            0            as above
    3  0.075        0            0            circle Circle_Diameter=1
    4  0.43         0            0            as above
    5  0.475        0            0            circle Circle_Diameter=0.75
    6  1            0            0            circle Circle_Diameter=1.3
    7  1            0            0            point

Pod "Joint_bead", child of "Raptor_SL_Center"
  location (X Y Z) 116.43 0 0, rotation 0 0 0; relative location -0.5 0 0, rotation 0 0 0
  bounding box size 0.75 0.6 0.6
  mass: Density=0 Shell_Flag=0 Mass_Area=1 Mass_Prior=0
  Design: FineRatio=2.5 Length=0.75

Pod "Joint_bead", child of "Raptor_SL_Center"
  location (X Y Z) 116.43 0 1.5, rotation 0 0 0; relative location -0.5 0 1.5, rotation 0 0 0
  6 copies around X
  bounding box size 0.75 3.28327 3.6
  mass: Density=0 Shell_Flag=0 Mass_Area=1 Mass_Prior=0
  Design: FineRatio=2.5 Length=0.75

Pod "Joint_bead", child of "Raptor_SL_Center"
  location (X Y Z) 115.93 1 2.75, rotation 0 0 0; relative location -1 1 2.75, rotation 0 0 0
  13 copies around X
  bounding box size 2 6.36177 6.40779
  mass: Density=0 Shell_Flag=0 Mass_Area=1 Mass_Prior=0
  Design: FineRatio=7.5 Length=2

Pod "Joint_bead", child of "Raptor_SL_Center"
  location (X Y Z) 114.93 4.25 0, rotation 0 0 0; relative location -2 4.25 0, rotation 0 0 0
  13 copies around X
  bounding box size 2.25 8.90226 8.96764
  mass: Density=0 Shell_Flag=0 Mass_Area=1 Mass_Prior=0
  Design: FineRatio=9 Length=2.25

Fuselage "Raptor_SL_InnerRing-6", child of "SuperHeavy Fuse"
  location (X Y Z) 116.93 0 1.5, rotation 0 0 0
  6 copies around X
  bounding box size 3.07 3.93966 4.3
  mass: Density=574 Shell_Flag=0 Mass_Area=1 Mass_Prior=2
  Design: Length=3.07
  cross sections:
    n  XLocPercent  YLocPercent  ZLocPercent  shape
    0  0            0            0            point
    1  0            0            0            circle Circle_Diameter=0.8
    2  0.03         0            0            as above
    3  0.075        0            0            circle Circle_Diameter=1
    4  0.43         0            0            as above
    5  0.475        0            0            circle Circle_Diameter=0.75
    6  1            0            0            circle Circle_Diameter=1.3
    7  1            0            0            point

Fuselage "Raptor_SL_MidRing-13", child of "SuperHeavy Fuse"
  location (X Y Z) 116.93 1 2.75, rotation -20 0 0
  13 copies around X
  bounding box size 3.07 7.10246 7.14278
  mass: Density=574 Shell_Flag=0 Mass_Area=1 Mass_Prior=2
  Design: Length=3.07
  cross sections:
    n  XLocPercent  YLocPercent  ZLocPercent  shape
    0  0            0            0            point
    1  0            0            0            circle Circle_Diameter=0.8
    2  0.03         0            0            as above
    3  0.075        0            0            circle Circle_Diameter=1
    4  0.43         0            0            as above
    5  0.475        0            0            circle Circle_Diameter=0.75
    6  1            0            0            circle Circle_Diameter=1.3
    7  1            0            0            point

Fuselage "Raptor_SL_OuterRing-13", child of "SuperHeavy Fuse"
  location (X Y Z) 116.93 4.25 0, rotation 0 0 0
  13 copies around X
  bounding box size 3.07 9.70054 9.77179
  mass: Density=574 Shell_Flag=0 Mass_Area=1 Mass_Prior=2
  Design: Length=3.07
  cross sections:
    n  XLocPercent  YLocPercent  ZLocPercent  shape
    0  0            0            0            point
    1  0            0            0            circle Circle_Diameter=0.8
    2  0.03         0            0            as above
    3  0.075        0            0            circle Circle_Diameter=1
    4  0.43         0            0            as above
    5  0.475        0            0            circle Circle_Diameter=0.75
    6  1            0            0            circle Circle_Diameter=1.3
    7  1            0            0            point

Fuselage "Starship Fuse"
  location (X Y Z) 0 0 0, rotation 0 0 0
  bounding box size 49.9876 9 9
  mass: Density=0 Shell_Flag=1 Mass_Area=40 Mass_Prior=0
  Design: Length=49.9876
  cross sections:
    n  XLocPercent  YLocPercent  ZLocPercent  shape
    0  0            0            0            point
    1  0.25         0            0            circle Circle_Diameter=9
    2  0.350087     0            0            as above
    3  0.6          0            0            as above
    4  0.787301     0            0            as above
    5  0.9          0            0            as above
    6  1            0            0            as above
  SS_Rectangle "PayloadBay_Door": Center_U=0.315 Center_W=0.75 U_Length=0.055 W_Length=0.08
  SS_Ellipse "Window": Center_U=0.22 Center_W=0.75 U_Length=0.02 W_Length=0.015
  SS_Ellipse "Window": Center_U=0.22 Center_W=0.8 U_Length=0.02 W_Length=0.015
  SS_Ellipse "Window": Center_U=0.22 Center_W=0.7 U_Length=0.02 W_Length=0.015
  SS_Ellipse "Window": Center_U=0.22 Center_W=0.725 U_Length=0.02 W_Length=0.015
  SS_Ellipse "Window": Center_U=0.22 Center_W=0.775 U_Length=0.02 W_Length=0.015

Fuselage "LOX_HeaderTank", child of "Starship Fuse"
  location (X Y Z) 1.65 0 0, rotation 0 0 0
  bounding box size 2.44576 3.84776 3.84776
  Design: Length=2.44576
  cross sections:
    n  XLocPercent  YLocPercent  ZLocPercent  shape
    0  0            0            0            circle Circle_Diameter=2.9
    1  1            0            0            point

Fuselage "CH4_Bulkhead", child of "Starship Fuse"
  location (X Y Z) 25.2 0 0, rotation 0 0 180
  bounding box size 3.5 9 9
  mass: Density=1 Shell_Flag=1 Mass_Area=0.5 Mass_Prior=0
  Design: Length=3.5
  cross sections:
    n  XLocPercent  YLocPercent  ZLocPercent  shape
    0  0            0            0            circle Circle_Diameter=9
    1  0.5          0            0            circle Circle_Diameter=7.34091
    2  0.899457     0            0            circle Circle_Diameter=3.31054
    3  1            0            0            point
  structure "CH4_Bulkhead_Struct0": Skin

Stack "vol_CH4Tank_2", child of "CH4_Bulkhead"
  location (X Y Z) 21.7 -8.88436e-06 0, rotation 0 0 180; relative location 0 0 0, rotation 0 0 0
  bounding box size 11.9768 9 9
  mass: Density=422.6 Shell_Flag=1 Mass_Area=40 Mass_Prior=1
  cross sections:
    n  XDelta    YDelta  ZDelta  shape
    0  0         0       0       point
    1  -0.35     0       0       circle Circle_Diameter=3.31054
    2  -1.4      0       0       circle Circle_Diameter=7.34091
    3  -1.75     0       0       circle Circle_Diameter=9
    4  -5.25     0       0       as above
    5  -1.75     0       0       circle Circle_Diameter=7.34091
    6  -1.47679  0       0       circle Circle_Diameter=2.95
    7  1.22      0       0       point

Fuselage "CommonBulkhead", child of "Starship Fuse"
  location (X Y Z) 30.45 0 0, rotation 0 0 0
  bounding box size 3.5 9 9
  Design: Length=3.5
  cross sections:
    n  XLocPercent  YLocPercent  ZLocPercent  shape
    0  0            0            0            circle Circle_Diameter=9
    1  0.5          0            0            circle Circle_Diameter=7.34091
    2  0.899457     0            0            circle Circle_Diameter=3.31054
    3  1            0            0            point

Fuselage "CH4_HeaderTank", child of "Starship Fuse"
  location (X Y Z) 32.45 0 0, rotation 0 0 0
  bounding box size 3 4 4
  mass: Density=422.6 Shell_Flag=1 Mass_Area=40 Mass_Prior=2
  Design: Length=3
  cross sections:
    n  XLocPercent  YLocPercent  ZLocPercent  shape
    0  0            0            0            point
    1  1            0            0            point

Stack "vol_LOXTank_2", child of "CH4_HeaderTank"
  location (X Y Z) 35.45 5.99999e-06 0, rotation 0 0 0; relative location 0 0 0, rotation 0 0 0
  bounding box size 16.2586 9 9
  mass: Density=1141 Shell_Flag=1 Mass_Area=40 Mass_Prior=1
  cross sections:
    n  XDelta   YDelta  ZDelta  shape
    0  0        0       0       point
    1  -1.5     0       0       circle Circle_Diameter=3
    2  -0.2725  0       0       circle Circle_Diameter=2.95
    3  -1.48    0       0       circle Circle_Diameter=7.34091
    4  -1.75    0       0       circle Circle_Diameter=9
    5  12.75    0       0       as above
    6  1.7586   0       0       circle Circle_Diameter=7.34091
    7  1.4      0       0       circle Circle_Diameter=3.31054
    8  0.35     0       0       point

Fuselage "ThrustBulkhead", child of "Starship Fuse"
  location (X Y Z) 43.2065 0 0, rotation 0 0 0
  bounding box size 3.5 9 9
  Design: Length=3.5
  cross sections:
    n  XLocPercent  YLocPercent  ZLocPercent  shape
    0  0            0            0            circle Circle_Diameter=9
    1  0.5          0            0            circle Circle_Diameter=7.34091
    2  0.899457     0            0            circle Circle_Diameter=3.31054
    3  1            0            0            point

Blank "Landing Gear Parent", child of "Starship Fuse"
  location (X Y Z) 44.9889 0 0, rotation 0 0 0
  Mass: Point_Mass=100 Point_Mass_Flag=1

Fuselage "LandingGearPod", child of "Landing Gear Parent"
  location (X Y Z) 44.9889 0 4.5, rotation 0 0 0; relative location 0 0 4.5, rotation 0 0 0
  6 copies around X
  bounding box size 4.99876 9.01191 9.99893
  mass: Density=6000 Shell_Flag=0 Mass_Area=1 Mass_Prior=1
  Design: Length=4.99876
  cross sections:
    n  XLocPercent  YLocPercent  ZLocPercent  shape
    0  0            0            -0.011       wedge Chord=0.65 DuLow=0.1 DuUp=0.0590909 FlatLow=0.388636 FlatUp=0.388636 SymmThick=1 ThickChord=0 ThickLoc=0.3 ThickLocLow=0.3 UForeLow=0.25 UForeUp=0.775 ZCamber=0.05
    1  0.125        0            -0.0175      wedge Chord=1.25 DuLow=0.1 DuUp=0.0590909 FlatLow=0.56 FlatUp=0.56 SymmThick=1 ThickChord=0.295455 ThickLoc=0.2 ThickLocLow=0.2 UForeLow=0.25 UForeUp=0.775 ZCamber=0.177273
    2  0.423317     0            -0.025       wedge Chord=1.75 DuLow=0.1 DuUp=0.0590909 FlatLow=0.388636 FlatUp=0.388636 SymmThick=1 ThickChord=0.313636 ThickLoc=0.3 ThickLocLow=0.3 UForeLow=0.25 UForeUp=0.775 ZCamber=0.2
    3  0.95         0            -0.03        wedge Chord=2.25 DuLow=0.1 DuUp=0.0590909 FlatLow=0.362727 FlatUp=0.388636 SymmThick=0 ThickChord=0.227273 ThickLoc=0.3 ThickLocLow=0.286364 UForeLow=0.25 UForeUp=0.775 ZCamber=0.15
    4  1            0            -0.0295109   wedge Chord=1.10114 DuLow=0.1 DuUp=0.1 FlatLow=0.5 FlatUp=0.5 SymmThick=0 ThickChord=0.35 ThickLoc=0.25 ThickLocLow=0.25 UForeLow=0.25 UForeUp=0.75 ZCamber=0.213636

Fuselage "Raptor_SL", child of "Starship Fuse"
  location (X Y Z) 46.8696 0 0.9, rotation 0 0 0
  3 copies around X
  bounding box size 3.07 2.90043 2.67079
  mass: Density=574 Shell_Flag=0 Mass_Area=1 Mass_Prior=2
  Design: Length=3.07
  cross sections:
    n  XLocPercent  YLocPercent  ZLocPercent  shape
    0  0            0            0            point
    1  0            0            0            circle Circle_Diameter=0.8
    2  0.03         0            0            as above
    3  0.075        0            0            circle Circle_Diameter=1
    4  0.43         0            0            as above
    5  0.475        0            0            circle Circle_Diameter=0.75
    6  1            0            0            circle Circle_Diameter=1.3
    7  1            0            0            point

Pod "Joint_bead", child of "Raptor_SL"
  location (X Y Z) 46.25 0 0.9, rotation 0 0 0
  3 copies around X
  bounding box size 1 2.01564 1.7784
  mass: Density=0 Shell_Flag=0 Mass_Area=1 Mass_Prior=0
  Design: FineRatio=5 Length=1

Fuselage "Raptor_Vac", child of "Starship Fuse"
  location (X Y Z) 45.95 0 -2.5, rotation 0 0 0
  3 copies around X
  bounding box size 4.05 6.80691 6.18839
  mass: Density=232 Shell_Flag=0 Mass_Area=1 Mass_Prior=2
  Design: Length=4.05
  cross sections:
    n  XLocPercent  YLocPercent  ZLocPercent  shape
    0  0            0            0            point
    1  0            0            0            circle Circle_Diameter=0.8
    2  0.0222222    0            0            as above
    3  0.0674074    0            0            circle Circle_Diameter=1
    4  0.3          0            0            as above
    5  0.325        0            0            circle Circle_Diameter=0.75
    6  1            0            0            circle Circle_Diameter=2.4
    7  1            0            0            point

Blank "Volumes"
  location (X Y Z) 0 0 0, rotation 0 0 0

Stack "vol_LOXheader", child of "Volumes"
  location (X Y Z) 0 0 0, rotation 0 0 0
  bounding box size 4.11721 3.81525 3.81525
  mass: Density=1141 Shell_Flag=1 Mass_Area=40 Mass_Prior=2
  cross sections:
    n  XDelta   YDelta  ZDelta  shape
    0  0        0       0       point
    1  1.65     0       0       circle Circle_Diameter=2.9
    2  2.46721  0       0       point

Stack "vol_Cargo+Crew", child of "Volumes"
  location (X Y Z) 4.11721 0 0, rotation 0 0 0
  bounding box size 23.55 9 9
  cross sections:
    n  XDelta    YDelta  ZDelta  shape
    0  0         0       0       point
    1  -2.46721  0       0       circle Circle_Diameter=2.9
    2  0         0       0       circle Circle_Diameter=3.19
    3  10.85     0       0       circle Circle_Diameter=9
    4  12.7      0       0       as above
    5  -1.75     0       0       circle Circle_Diameter=7.34091
    6  -1.4      0       0       circle Circle_Diameter=3.31054
    7  -0.35     0       0       point

Conformal "Crew+Cargo_Internal", child of "vol_Cargo+Crew"
  location (X Y Z) 4.11721 0 0, rotation 0 0 0; relative location 0 0 0, rotation 0 0 0
  bounding box size 20.0551 8.7 8.7
  mass: Density=1.225 Shell_Flag=1 Mass_Area=20 Mass_Prior=1
  Design: ChordTrimFlag=0 ChordTrimMax=0.9 ChordTrimMin=0.1 Offset=0.15 UTrimFlag=1 UTrimMax=0.511 UTrimMin=0.221 V1TrimBegin=0.3 V1TrimEnd=1 V1TrimFlag=0 V2TrimBegin=0.25 V2TrimEnd=0.75 V2TrimFlag=0

Fuselage "Floor", child of "Crew+Cargo_Internal"
  location (X Y Z) 18.9272 0 0, rotation -180 0 -180; relative location 18.9272 0 0, rotation 0 180 0
  bounding box size 0.22 8.7 8.7
  Design: Length=0.22
  cross sections:
    n  XLocPercent  YLocPercent  ZLocPercent  shape
    0  0            0            0            point
    1  0            0            0            circle Circle_Diameter=8.7
    2  1            0            0            as above
    3  1            0            0            point

Fuselage "Level 1", child of "Crew+Cargo_Internal"
  location (X Y Z) 18.7 0 0, rotation -180 0 -180; relative location 18.7 0 0, rotation 0 180 0
  bounding box size 3 8.7 8.7
  Design: Length=3
  cross sections:
    n  XLocPercent  YLocPercent  ZLocPercent  shape
    0  0            0            0            point
    1  0            0            0            circle Circle_Diameter=8.7
    2  1            0            0            as above
    3  1            0            0            point

Fuselage "Level 2", child of "Crew+Cargo_Internal"
  location (X Y Z) 15.48 0 0, rotation -180 0 -180; relative location 15.48 0 0, rotation 0 180 0
  bounding box size 3 8.7 8.7
  Design: Length=3
  cross sections:
    n  XLocPercent  YLocPercent  ZLocPercent  shape
    0  0            0            0            point
    1  0            0            0            circle Circle_Diameter=8.7
    2  1            0            0            as above
    3  1            0            0            point

Fuselage "Level 3", child of "Crew+Cargo_Internal"
  location (X Y Z) 12.26 0 0, rotation -180 0 -180; relative location 12.26 0 0, rotation 0 180 0
  bounding box size 3 8.7 8.7
  Design: Length=3
  cross sections:
    n  XLocPercent  YLocPercent  ZLocPercent  shape
    0  0            0            0            point
    1  0            0            0            circle Circle_Diameter=8.7
    2  1            0            0            circle Circle_Diameter=8.08
    3  1            0            0            point

Fuselage "Level 4", child of "Crew+Cargo_Internal"
  location (X Y Z) 9.04 0 0, rotation -180 0 -180; relative location 9.04 0 0, rotation 0 180 0
  bounding box size 3 8 8
  Design: Length=3
  cross sections:
    n  XLocPercent  YLocPercent  ZLocPercent  shape
    0  0            0            0            point
    1  0            0            0            circle Circle_Diameter=8
    2  1            0            0            circle Circle_Diameter=6.455
    3  1            0            0            point

Fuselage "Level 5", child of "Crew+Cargo_Internal"
  location (X Y Z) 5.82 0 0, rotation -180 0 -180; relative location 5.82 0 0, rotation 0 180 0
  bounding box size 2.75 5.768 5.768
  Design: Length=2.75
  cross sections:
    n  XLocPercent  YLocPercent  ZLocPercent  shape
    0  0            0            0            point
    1  0            0            0            circle Circle_Diameter=5.768
    2  0.63587      0            0            circle Circle_Diameter=4.6
    3  1            0            0            circle Circle_Diameter=3.9
    4  1            0            0            point

Stack "New_Level 5", child of "Crew+Cargo_Internal"
  location (X Y Z) 5.82 0 0, rotation -180 0 -180; relative location 5.82 0 0, rotation 0 180 0
  bounding box size 2.74898 6.325 6.325
  cross sections:
    n  XDelta    YDelta  ZDelta  shape
    0  0         0       0       point
    1  0         0       0       circle Circle_Diameter=6.325
    2  1.74641   0       0       circle Circle_Diameter=5.06
    3  1.00256   0       0       circle Circle_Diameter=4.232
    4  0         0       0       circle Circle_Diameter=2.9233
    5  -1.05142  0       0       point

Fuselage "Spacer"
  location (X Y Z) 21.7 0 0, rotation -180 0 -180
  bounding box size 3 2.75 2.75
  Design: Length=3
  cross sections:
    n  XLocPercent  YLocPercent  ZLocPercent  shape
    0  0            0            0            point
    1  0            0            0            circle Circle_Diameter=2.75
    2  0.5          0            0            as above
    3  1            0            0            as above
    4  1            0            0            point

Hinge "HingeGeom"
  location (X Y Z) 4.75 0 1, rotation 0 90 0
  Hinge: JointRotMax=-30 JointRotMaxFlag=1 JointRotMin=-85 JointRotMinFlag=1 JointRotate=-85 JointRotateFlag=1 JointTransMax=1 JointTransMaxFlag=1 JointTransMin=-1 JointTransMinFlag=1 JointTranslate=0 JointTranslateFlag=1 OrientRotFlag=1 PrimOffAbsRelFlag=1 PrimType=0 PrimULoc=0 PrimVecAbsRelFlag=1 PrimWLoc=0 PrimXOff=0 PrimXOffRel=0 PrimXVec=0 PrimXVecRel=0 PrimYOff=0 PrimYOffRel=0 PrimYVec=1 PrimYVecRel=1 PrimZOff=0 PrimZOffRel=0 PrimZVec=0 PrimZVecRel=0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

Blank "Flight_Deck_R1", child of "HingeGeom"
  location (X Y Z) 4.75 0 1, rotation 90 0 -5; relative location 0 0 0, rotation 90 0 0

Human "Crew_1", child of "Flight_Deck_R1"
  location (X Y Z) 4.75 0.8 1, rotation 0 -85 0; relative location 0 0 -0.8, rotation -90 -90 0
  mass: Density=1084.75 Shell_Flag=0 Mass_Area=1 Mass_Prior=0
  Anthropometric: Age=30 AutoDensity=1 BMI=21.1546 BMI_pct=0.0629171 GenderFlag=0 LenUnit=2 Mass=63.68 MassUnit=1 SitFrac=0.51 Stature=1.735 Stature_pct=0.389873 Volume=0.0587048

Human "Crew_2", child of "Flight_Deck_R1"
  location (X Y Z) 4.76307 0 1.14943, rotation 0 -85 0; relative location 0 0.15 0, rotation -90 -90 0
  mass: Density=1046.98 Shell_Flag=0 Mass_Area=1 Mass_Prior=0
  Anthropometric: Age=30 AutoDensity=1 BMI=20 BMI_pct=0.0629171 GenderFlag=1 LenUnit=2 Mass=60.2045 MassUnit=1 SitFrac=0.51 Stature=1.735 Stature_pct=0.95 Volume=0.0575032

Human "Crew_3", child of "Flight_Deck_R1"
  location (X Y Z) 4.75 -0.8 1, rotation 0 -85 0; relative location 0 0 0.8, rotation -90 -90 0
  mass: Density=1026.49 Shell_Flag=0 Mass_Area=1 Mass_Prior=0
  Anthropometric: Age=30 AutoDensity=1 BMI=17.9981 BMI_pct=0.05 GenderFlag=0 LenUnit=2 Mass=63.68 MassUnit=1 SitFrac=0.51 Stature=1.881 Stature_pct=0.95 Volume=0.0620369

Blank "Flight_Deck_R2", child of "HingeGeom"
  location (X Y Z) 4.82408 0 1.84677, rotation 90 0 -5; relative location 0 0 0.85, rotation 90 0 0

Human "Crew_4", child of "Flight_Deck_R2"
  location (X Y Z) 4.82408 0.8 1.84677, rotation 0 -85 0; relative location 0 0 -0.8, rotation -90 -90 0
  mass: Density=1084.75 Shell_Flag=0 Mass_Area=1 Mass_Prior=0
  Anthropometric: Age=30 AutoDensity=1 BMI=21.1546 BMI_pct=0.0629171 GenderFlag=0 LenUnit=2 Mass=63.68 MassUnit=1 SitFrac=0.51 Stature=1.735 Stature_pct=0.389873 Volume=0.0587048

Human "Crew_5", child of "Flight_Deck_R2"
  location (X Y Z) 4.83716 0 1.99619, rotation 0 -85 0; relative location 0 0.15 0, rotation -90 -90 0
  mass: Density=1046.98 Shell_Flag=0 Mass_Area=1 Mass_Prior=0
  Anthropometric: Age=30 AutoDensity=1 BMI=20 BMI_pct=0.0629171 GenderFlag=1 LenUnit=2 Mass=60.2045 MassUnit=1 SitFrac=0.51 Stature=1.735 Stature_pct=0.95 Volume=0.0575032

Human "Crew_6", child of "Flight_Deck_R2"
  location (X Y Z) 4.82408 -0.8 1.84677, rotation 0 -85 0; relative location 0 0 0.8, rotation -90 -90 0
  mass: Density=1026.49 Shell_Flag=0 Mass_Area=1 Mass_Prior=0
  Anthropometric: Age=30 AutoDensity=1 BMI=17.9981 BMI_pct=0.05 GenderFlag=0 LenUnit=2 Mass=63.68 MassUnit=1 SitFrac=0.51 Stature=1.881 Stature_pct=0.95 Volume=0.0620369

User parameters
  Default_Group:Diameter = 9  (Nominal diameter)
  Default_Group:FR = 13.33  (Fineness Ratio)
  Default_Group:L = 119.97  (Total Vehicle Length)
  Default_Group:Xi = 0.583  (Stage length ratio)
  Default_Group:angle_span = 3.18198  (angle span)
  Default_Group:gridFin_a = 2.25  (Grid fin width)
  Default_Group:gridFin_b = 4.5  (Grid fin length)
  Default_Group:gridFin_theta = 45  (Grid fin angle)
  Default_Group:t_w = 0.15  (Effective Wall thickness)

Parameter links (A drives B)
  Starship Fuse:XSec_0:TopLAngle -> vol_LOXheader:XSec_0:TopLAngle
  LOX_HeaderTank:XSec_0:TopLAngle -> vol_LOXheader:XSec_1:TopLAngle
  LOX_HeaderTank:XSec_0:Circle_Diameter -> vol_LOXheader:XSec_1:Circle_Diameter
  LOX_HeaderTank:XForm:X_Rel_Location -> vol_LOXheader:XSec_2:XDelta Offset=0.817213
  LOX_HeaderTank:XSec_1:TopLStrength -> vol_LOXheader:XSec_2:TopLStrength
  vol_LOXheader:XSec_2:XDelta -> vol_Cargo+Crew:XForm:X_Rel_Location Offset=1.65
  vol_LOXheader:XSec_2:TopLAngle -> vol_Cargo+Crew:XSec_0:TopLAngle Scale=-1
  Starship Fuse:XSec_1:XLocPercent -> vol_Cargo+Crew:XSec_3:XDelta Offset=10.6
  CH4_Bulkhead:XSec_1:Circle_Diameter -> vol_Cargo+Crew:XSec_5:Circle_Diameter
  CH4_Bulkhead:XSec_2:Circle_Diameter -> vol_Cargo+Crew:XSec_6:Circle_Diameter
  CH4_Bulkhead:XSec_2:Circle_Diameter -> vol_CH4Tank_2:XSec_1:Circle_Diameter
  CH4_Bulkhead:XSec_1:Circle_Diameter -> vol_CH4Tank_2:XSec_2:Circle_Diameter
  CH4_Bulkhead:XSec_1:Circle_Diameter -> vol_CH4Tank_2:XSec_5:Circle_Diameter
  vol_CH4Tank_2:XSec_6:Circle_Diameter -> vol_LOXTank_2:XSec_2:Circle_Diameter
  CH4_Bulkhead:XSec_1:Circle_Diameter -> vol_LOXTank_2:XSec_3:Circle_Diameter
  ThrustBulkhead:XSec_1:Circle_Diameter -> vol_LOXTank_2:XSec_6:Circle_Diameter
  ThrustBulkhead:XSec_2:Circle_Diameter -> vol_LOXTank_2:XSec_7:Circle_Diameter
  UserParm:Default_Group:t_w -> Crew+Cargo_Internal:Design:Offset
  UserParm:Default_Group:L -> SuperHeavy Fuse:Design:Length Scale=0.583479
  UserParm:Default_Group:Diameter -> SuperHeavy Fuse:XSec_0:Circle_Diameter
  UserParm:Default_Group:L -> Starship Fuse:Design:Length Scale=0.416668
  UserParm:Default_Group:Diameter -> Starship Fuse:XSec_1:Circle_Diameter
  UserParm:Default_Group:Diameter -> Starship Fuse:XSec_2:Circle_Diameter
  UserParm:Default_Group:Diameter -> Starship Fuse:XSec_3:Circle_Diameter
  UserParm:Default_Group:Diameter -> Starship Fuse:XSec_4:Circle_Diameter
  UserParm:Default_Group:Diameter -> Starship Fuse:XSec_5:Circle_Diameter
  UserParm:Default_Group:Diameter -> Starship Fuse:XSec_6:Circle_Diameter
  UserParm:Default_Group:L -> SuperHeavy Fuse:XForm:X_Rel_Location Scale=0.416668
  UserParm:Default_Group:Diameter -> LandingGearPod:XForm:Z_Rel_Location Scale=0.5
  UserParm:Default_Group:L -> Landing Gear Parent:XForm:X_Rel_Location Scale=0.375001
  UserParm:Default_Group:L -> LandingGearPod:Design:Length Scale=0.0416668
  vol_CH4_1:XSec_2:Circle_Diameter -> vol_CH4_1:XSec_5:Circle_Diameter
  vol_CH4_1:XSec_1:Circle_Diameter -> vol_CH4_1:XSec_6:Circle_Diameter

Advanced link "angle_span_calc"
  input A = UserParm:Default_Group:gridFin_a
  input THETA = UserParm:Default_Group:gridFin_theta
  output H = UserParm:Default_Group:angle_span
    H = A/sin(THETA*3.14159/180);

Advanced link "L_calc"
  input D = UserParm:Default_Group:Diameter
  input FR = UserParm:Default_Group:FR
  output L = UserParm:Default_Group:L
    L = D*FR;

VSPAERO settings: Sref=2.25 bref=9 cref=0.25 Xcg=28.2925 Ycg=0 Zcg=0 AlphaStart=0 AlphaEnd=10 AlphaNpts=5 BetaStart=0 BetaEnd=0 BetaNpts=1 MachStart=0.3 MachEnd=0 MachNpts=1 ReCref=1e+07 Vinf=100 Rho=0.002377
